# Molecular Dynamics - Input Script for H2O Solvated PEG

# 1) Initialization
units real
atom_style full
bond_style harmonic
angle_style harmonic
dihedral_style harmonic
pair_style lj/cut/coul/long 12
kspace_style pppm 1e-5
special_bonds lj 0.0 0.0 0.5 coul 0.0 0.0 1.0 angle yes dihedral yes

# 2) System Definition
read_data ../pure-H2O/H2O.data extra/bond/per/atom 2 extra/angle/per/atom  5 extra/dihedral/per/atom 9 extra/special/per/atom 14
read_data ../single-PEG/PEG.data

# 3) Simulation Settings
include ../H2O-PEG-parameters.lammps

group H2O type 8 9
group PEG type 1 2 3 4 5 6 7

delete_atoms overlap 2.0 H2O PEG mol yes

# 4) Run
fix npt_ensemble all npt temp 300 300 100 iso 1 1 1000
timestep 1.0

dump dump_all_atoms_per_100_timestep all atom 100 trajectory-output-data/dump_all_atoms_per_100_timestep.lammpstrj
thermo 100

variable solvated_PEG_temp equal temp
variable solvated_PEG_vol equal vol

fix solvated_PEG_ave_temp all ave/time 10 10 100 v_solvated_PEG_temp file ave-time-output-data/ave_solvated_PEG_temperature.dat
fix solvated_PEG_ave_vol all ave/time 10 10 100 v_solvated_PEG_vol file ave-time-output-data/ave_solvated_PEG_volume.dat

variable solvated_PEG_enthalpy equal enthalpy
fix solvated_PEG_ave_enthalpy all ave/time 10 10 100 v_solvated_PEG_enthalpy file ave-time-output-data/ave_solvated_PEG_enthalpy.dat

run 10000
write_data solvated_PEG.data
